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/batch
! ANSYS input file written by Workbench version 2021 R1
! File used for geometry attach: E:\毕业设计\workbench\workbench3.17\力传感器4×4.STEP
/title,wbnew--__ (B5)
/com,--- Data in consistent MKS units. See Solving Units in the help system for more information.
/units,MKS
/prep7
! Turn off shape checking because checks already performed inside WB mesher.
! See help system for more information.
SHPP,OFF,,NOWARN
etcon,set             ! allow ANSYS to choose best KEYOP's for 180x elements, resets any applicable keyopt to MAPDL defaults
/com,*********** Nodes for the whole assembly ***********
nblock,3,,25326
(1i9,3e20.9e3)
        1     1.706743143E-03     3.888010809E-03    -2.907527922E-02
        2    -9.144949732E-03     1.964298586E-03     3.177966899E-02
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-1
/com,*********** Elements for Body 1 "____4_4-FreeParts|____-____7" ***********
et,1,187
eblock,19,solid,,1048
(19i9)
        1        1        1        1        0        0        0        0       10        0        1      129     1736     1259     1272     6548    13209     6545     6546
    13279    13207
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-1
et,2,186
keyo,2,2,1          ! set full integration on SOLID186
eblock,19,solid,,5180
(19i9)
        1        2        1        1        0        0        0        0       20        0     1049        4     1466      499      489     2291     1125     1779      925
     5587     9091     9031     5583    12587    12586    11616    11617     5589    12585     9093     9033
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-1
/com,*********** Send User Defined Coordinate System(s) ***********
csys,0
toffst,273.15,  ! Temperature offset from absolute zero
/com,*********** Set Reference Temperature ***********
tref,22.
/com,*********** Send Materials ***********
MP,EX,1,72000000000,	! Pa
MP,NUXY,1,0.32,
MP,DENS,1,2810,	! kg m^-3

!************************* Model Summary ********************
!____4_4-FreeParts|____-____7,	7075,	matid,	1
!************************* End Model Summary ********************
CMBLOCK,_CM34_FIXEDSU,NODE,     2574
(8i10)
      2897      2898      2899      2901      2902      2903      2904      2919
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/com,*********** Fixed Supports ***********
CMBLOCK,_FIXEDSU,NODE,     2574
(8i10)
      2897      2898      2899      2901      2902      2903      2904      2919
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cmsel,s,_FIXEDSU
d,all,all
nsel,all
fini
/solu
antype,2                   ! modal analysis
_thickRatio=  1     ! Ratio of thick parts in the model
modopt,lanb,6
outres,erase
outres,all,none
outres,nsol,all
outres,etmp,all
outres,strs,all
outres,epel,all
outres,eppl,all
outres,rsol,all
nsel,s,d,U
nsel,a,d,ROT
esln
cm,_ConstrainedNodes,elem  ! -- reduced set with only constrained nodes
nsel,all
esel,all
outres,nload,all,_ConstrainedNodes  !-- reduced set with only constrained nodes
mxpand,,,,yes,,no             ! expand requested element results, but not write them to file.mode
! *********** WB SOLVE COMMAND ***********
! check interactive state
*get,ANSINTER_,active,,int
*if,ANSINTER_,ne,0,then
/eof
*endif
solve
/com *************** Write FE CONNECTORS *********
CEWRITE,file,ce,,INTE
*get,_nmodalsolproc,active,0,numcpu
fini
save,file,db
/post1
*dim,_direction,CHAR,6,1
_direction(1) = 'X'
_direction(2) = 'Y'
_direction(3) = 'Z'
_direction(4) = 'ROTX'
_direction(5) = 'ROTY'
_direction(6) = 'ROTZ'
*get,_lastLS,active,0,set,LSTP
*get,_beginset,active,0,set,nset,first,_lastLS
*get,_endset,active,0,set,nset,last,_lastLS
_nummodes = 0
*if,_endset,gt,0,then
_nummodes = _endset - _beginset + 1
*endif
*do,i_mode,1,_nummodes
   *do,j_component,1,6
			*get,PFACT_%i_mode%_%j_component%,MODE,%i_mode%,PFACT,,DIREC,_direction(%j_component%)
   *enddo
*enddo
*dim,_tmdirection,CHAR,6,1
_tmdirection(1) = 'X'
_tmdirection(2) = 'Y'
_tmdirection(3) = 'Z'
_tmdirection(4) = 'X'
_tmdirection(5) = 'Y'
_tmdirection(6) = 'Z'
*do,j_component,1,6
    *if,j_component,gt,3,then
        *get,TOTALMASS_%j_component%,ELEM,0,IOR,_tmdirection(%j_component%)
    *else
        *get,TOTALMASS_%j_component%,ELEM,0,MTOT,_tmdirection(%j_component%)
    *endif
*enddo
fini
