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/batch
! ANSYS input file written by Workbench version 2021 R1
! File used for geometry attach: E:\毕业设计\workbench\workbench3.17\力传感器4×4.STEP
/title,_________________--__ (D5)
/com,--- Data in consistent NMM units. See Solving Units in the help system for more information.
/units,MPA
/prep7
! Turn off shape checking because checks already performed inside WB mesher.
! See help system for more information.
SHPP,OFF,,NOWARN
etcon,set             ! allow ANSYS to choose best KEYOP's for 180x elements, resets any applicable keyopt to MAPDL defaults
/com,*********** Nodes for the whole assembly ***********
nblock,3,,8877
(1i9,3e20.9e3)
        1     0.000000000E+00     3.000000000E+00     7.000000000E+00
        2     2.000000000E+00     3.000000000E+00     6.708203932E+00
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-1
/com,*********** Elements for Body 1 "____4_4-FreeParts|____-____7" ***********
et,1,187
eblock,19,solid,,4446
(19i9)
        1        1        1        1        0        0        0        0       10        0        1      680     1138     1313     1302     5545     7739     5547     5546
     7738     8068
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-1
/com,*********** Send User Defined Coordinate System(s) ***********
csys,0
toffst,273.15,  ! Temperature offset from absolute zero
/com,*********** Set Reference Temperature ***********
tref,22.
/com,*********** Send Materials ***********
MP,EX,1,72000,	! tonne s^-2 mm^-1
MP,NUXY,1,0.32,
MP,DENS,1,2.81e-09,	! tonne mm^-3

!************************* Model Summary ********************
!____4_4-FreeParts|____-____7,	7075,	matid,	1
!************************* End Model Summary ********************
/com,*********** Fixed Supports ***********
CMBLOCK,_FIXEDSU,NODE,     1290
(8i10)
        13        14        15        16        17        18        19        20
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cmsel,s,_FIXEDSU
d,all,all
nsel,all
/com,*********** Define Force Using Surface Effect Elements ***********
local,12,0,0.,0.,0.,0.,0.,0.
csys,0
et,2,154
eblock,10,,,68
(15i9)
     6417        2        2        2       12      942      950      959      959     6861     6907      959     6864
     6418        2        2        2       12      942      955      950      950     6863     6906      950     6861
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-1
esel,s,type,,2
keyop,2,2,1                ! Apply load in local coordinate system
keyop,2,7,1                ! Use original area so load is constant in large deformation
esel,all

*DIM,_loadvari38x,TABLE,2,1,1,TIME,
! Time values
_loadvari38x(1,0,1) = 0.
_loadvari38x(2,0,1) = 0.1
! Load values
_loadvari38x(1,1,1) = 0.
_loadvari38x(2,1,1) = 0.


*DIM,_loadvari38y,TABLE,4,1,1,TIME,
! Time values
_loadvari38y(1,0,1) = 0.
_loadvari38y(2,0,1) = 0.1
_loadvari38y(3,0,1) = 0.100002
_loadvari38y(4,0,1) = 0.10002
! Load values
_loadvari38y(1,1,1) = 0.
_loadvari38y(2,1,1) = 0.
_loadvari38y(3,1,1) = 0.
_loadvari38y(4,1,1) = 1.76842403893247e-002

fini
/com,****************************************************************************
/com,*************************    SOLUTION       ********************************
/com,****************************************************************************
/solu
antype,4                   ! transient analysis
nlgeom,on                  ! Turn on Large Deformation Effects
kbc,1                      ! stepped BC's
_thickRatio=  1     ! Ratio of thick parts in the model
eqsl,pcg,1e-8,,,,,,1
cntr,print,1               ! print out contact info and also make no initial contact an error
trnopt,full,,,,,hht        ! HHT time integration method
tintp, mosp			! Choose transient integration settings for moderate speed application
nldiag,cont,iter           ! print out contact info each equilibrium iteration
rescontrol,define,last,last,,dele	   ! Program Controlled
/com,****************************************************
/com,******************* SOLVE FOR LS 1 OF 3 ****************
esel,s,type,,2
nsle
sfe,all,1,pres,1,%_loadvari38x%
sfe,all,2,pres,1,%_loadvari38y%
sfe,all,3,pres,1,0.
nsel,all
esel,all
autots,off                 ! User turned off automatic time stepping
nsub,10,10,10
time,0.1
timint,on                  ! Turn on time integration effects
outres,erase
outres,all,none
outres,nsol,all,
outres,rsol,all
outres,eangl,all
outres,etmp,all
outres,veng,all
outres,strs,all,
outres,epel,all,
outres,eppl,all,
outres,cont,all,
outres,v,all,
outres,a,all,
! *********** WB SOLVE COMMAND ***********
! check interactive state
*get,ANSINTER_,active,,int
*if,ANSINTER_,ne,0,then
/eof
*endif
solve
/com *************** Write FE CONNECTORS *********
CEWRITE,file,ce,,INTE
/com,****************************************************
/com,*************** FINISHED SOLVE FOR LS 1 *************
/com,****************************************************
/com,******************* SOLVE FOR LS 2 OF 3 ****************
autots,off                 ! User turned off automatic time stepping
nsub,800,800,800
time,0.100002
timint,on                  ! Turn on time integration effects
outres,erase
outres,all,none
outres,nsol,all,
outres,rsol,all
outres,eangl,all
outres,etmp,all
outres,veng,all
outres,strs,all,
outres,epel,all,
outres,eppl,all,
outres,cont,all,
outres,v,all,
outres,a,all,
solve
/com,****************************************************
/com,*************** FINISHED SOLVE FOR LS 2 *************
/com,****************************************************
/com,******************* SOLVE FOR LS 3 OF 3 ****************
autots,off                 ! User turned off automatic time stepping
nsub,800,800,800
time,0.115
timint,on                  ! Turn on time integration effects
outres,erase
outres,all,none
outres,nsol,all,
outres,rsol,all
outres,eangl,all
outres,etmp,all
outres,veng,all
outres,strs,all,
outres,epel,all,
outres,eppl,all,
outres,cont,all,
outres,v,all,
outres,a,all,
solve
/com,****************************************************
/com,*************** FINISHED SOLVE FOR LS 3 *************
*get,_PCGITER,active,,solu,cgiter
/post1
fini
